# OpenSim document version 30000
AnalyzeTool DefaultPosition:
  model_file: ../subject1_scaled.osim
  replace_force_set: false
  results_directory: .
  output_precision: 8
  initial_time: 0.01
  final_time: 0.1
  solve_for_equilibrium_for_auxiliary_states: false
  maximum_number_of_integrator_steps: 20000
  maximum_integrator_step_size: 1
  minimum_integrator_step_size: 1e-8
  integrator_error_tolerance: 1e-5
  coordinates_file: DefaultPosition.mot
  lowpass_cutoff_frequency_for_coordinates: -1
  AnalysisSet Analyses:
    PointKinematics: start_time=0.01 end_time=0.1 step_interval=1 in_degrees=true body_name=tibia_r
        relative_to_body_name=femur_r point_name=origin_r point=(0 0 0)
