# OpenSim document version 40000
InverseKinematicsTool gait_27:
  results_directory: C:\Users\u0101727\Documents\MyRepositories\3dpredictsim\OpenSimModel\subject2\IK\
  model_file: C:\Users\u0101727\Documents\MyRepositories\3dpredictsim\OpenSimModel\subject2\Models\subject2_withMTP_weldRadius_scaled_FK.osim
  constraint_weight: 20
  accuracy: 1e-5
  time_range: 1.75 3.1
  output_motion_file: C:\Users\u0101727\Documents\MyRepositories\3dpredictsim\OpenSimModel\subject2\IK\IK_gait_27.mot
  report_errors: true
  marker_file: C:\Users\u0101727\Documents\MyRepositories\3dpredictsim\OpenSimModel\subject2\TRC\gait_27.trc
  report_marker_locations: false
  IKTaskSet:
    IKMarkerTask RASI: apply=true weight=1
    IKMarkerTask LASI: apply=true weight=1
    IKMarkerTask CLAV: apply=true weight=0.5
    IKMarkerTask RSHO: apply=true weight=0.8
    IKMarkerTask LSHO: apply=true weight=0.8
    IKMarkerTask RKNE: apply=true weight=1
    IKMarkerTask RKNE_med: apply=false weight=1
    IKMarkerTask RTHI1: apply=true weight=0.5
    IKMarkerTask RTHI2: apply=true weight=0.5
    IKMarkerTask RTHI3: apply=true weight=0.5
    IKMarkerTask RANK: apply=true weight=0.8
    IKMarkerTask RANK_med: apply=true weight=0.25
    IKMarkerTask RTIB1: apply=true weight=0.5
    IKMarkerTask RTIB2: apply=true weight=0.5
    IKMarkerTask RTIB3: apply=true weight=0.5
    IKMarkerTask Foot_r6: apply=true weight=0.5
    IKMarkerTask Foot_r1: apply=true weight=0.5
    IKMarkerTask Foot_r4: apply=true weight=0.25
    IKMarkerTask Foot_r7: apply=true weight=0.5
    IKMarkerTask LKNE: apply=true weight=1
    IKMarkerTask LKNE_med: apply=false weight=1
    IKMarkerTask LTHI1: apply=true weight=0.5
    IKMarkerTask LTHI2: apply=true weight=0.5
    IKMarkerTask LTHI3: apply=true weight=0.5
    IKMarkerTask LANK: apply=true weight=0.8
    IKMarkerTask LANK_med: apply=true weight=0.25
    IKMarkerTask LTIB1: apply=true weight=0.5
    IKMarkerTask LTIB2: apply=true weight=0.5
    IKMarkerTask LTIB3: apply=true weight=0.5
    IKMarkerTask foot_l6: apply=true weight=0.5
    IKMarkerTask foot_l1: apply=true weight=0.5
    IKMarkerTask foot_l4: apply=true weight=0.25
    IKMarkerTask foot_l7: apply=true weight=0.5
    IKMarkerTask RPSI: apply=true weight=1
    IKMarkerTask LPSI: apply=true weight=1
    IKMarkerTask RELB: apply=true weight=0.5
    IKMarkerTask LELB: apply=true weight=0.5
    IKMarkerTask RW1: apply=true weight=0.2
    IKMarkerTask RW2: apply=true weight=0.2
    IKMarkerTask LW1: apply=true weight=0.2
    IKMarkerTask LW2: apply=true weight=0.2
    IKMarkerTask LH: apply=true weight=0.1
    IKMarkerTask RH: apply=true weight=0.1
    IKMarkerTask hum_l2: apply=true weight=0.1
    IKMarkerTask hum_r2: apply=true weight=0.1
    IKMarkerTask rad_l2: apply=true weight=0.1
    IKMarkerTask rad_r2: apply=true weight=0.1
