# OpenSim document version 40000
ScaleTool subject2_withMTP_scaled:
  mass: 62 [kg]
  height: -1
  age: -1
  GenericModelMaker:
    model_file: ../Models/FullBodyModel_withMTP_weldRadius.osim
  ModelScaler:
    apply: true
    scaling_order: measurements
    marker_file: ../TRC/static.trc
    time_range: 0.1 0.3
    preserve_mass_distribution: true
    MeasurementSet:
      Measurement Pelvis_XY: apply=true
        MarkerPair: markers=(RASI CLAV)
        MarkerPair: markers=(LASI CLAV)
        BodyScale pelvis: axes=(X Y)
      Measurement Pelvis_Z: apply=true
        MarkerPair: markers=(RASI LASI)
        BodyScale pelvis: axes=Z
      Measurement Femur: apply=true
        MarkerPair: markers=(LASI LKNE_med)
        MarkerPair: markers=(RASI RKNE_med)
        MarkerPair: markers=(LASI LKNE)
        MarkerPair: markers=(RASI RKNE)
        BodyScale femur_r: axes=(X Y Z)
        BodyScale femur_l: axes=(X Y Z)
      Measurement Tibia: apply=true
        MarkerPair: markers=(RKNE_med RANK_med)
        MarkerPair: markers=(LKNE_med LANK_med)
        MarkerPair: markers=(LKNE LANK)
        MarkerPair: markers=(RKNE RANK)
        BodyScale tibia_r: axes=(X Y Z)
        BodyScale tibia_l: axes=(X Y Z)
      Measurement Footh: apply=true
        MarkerPair: markers=(foot_l1 foot_l7)
        MarkerPair: markers=(Foot_r1 Foot_r7)
        BodyScale talus_r: axes=(X Y Z)
        BodyScale calcn_r: axes=(X Y Z)
        BodyScale toes_r: axes=(X Y Z)
        BodyScale talus_l: axes=(X Y Z)
        BodyScale calcn_l: axes=(X Y Z)
        BodyScale toes_l: axes=(X Y Z)
      Measurement Torso_XZ: apply=true
        MarkerPair: markers=(RSHO LSHO)
        BodyScale torso: axes=(X Z)
      Measurement Torso_Y: apply=true
        MarkerPair: markers=(LSHO LASI)
        MarkerPair: markers=(RSHO RASI)
        BodyScale torso: axes=Y
      Measurement Upper_Arm: apply=true
        MarkerPair: markers=(RSHO LELB)
        MarkerPair: markers=(RSHO RELB)
        BodyScale humerus_r: axes=(X Y Z)
        BodyScale humerus_l: axes=(X Y Z)
      Measurement Lower_Arm: apply=true
        MarkerPair: markers=(RELB RW1)
        MarkerPair: markers=(LELB LW1)
        BodyScale ulna_r: axes=(X Y Z)
        BodyScale radius_r: axes=(X Y Z)
        BodyScale hand_r: axes=(X Y Z)
        BodyScale ulna_l: axes=(X Y Z)
        BodyScale radius_l: axes=(X Y Z)
        BodyScale hand_l: axes=(X Y Z)
  MarkerPlacer:
    apply: true
    marker_file: ../TRC/static.trc
    time_range: 0.1 0.3
    output_motion_file: subject2_withMTP_weldRadius_scaled.mot
    output_model_file: ../Models/subject2_withMTP_weldRadius_scaled.osim
    output_marker_file: subject2_withMTP_weldRadius_scaled.sto
    max_marker_movement: -1
    IKTaskSet:
      IKMarkerTask RASI: apply=true weight=25
      IKMarkerTask LASI: apply=true weight=25
      IKMarkerTask CLAV: apply=true weight=1
      IKMarkerTask RSHO: apply=true weight=12
      IKMarkerTask LSHO: apply=true weight=12
      IKMarkerTask RKNE: apply=true weight=15
      IKMarkerTask RTHI2: apply=false weight=1
      IKMarkerTask RTHI3: apply=false weight=1
      IKMarkerTask RANK: apply=true weight=15
      IKMarkerTask RTIB2: apply=false weight=1
      IKMarkerTask RTIB3: apply=false weight=1
      IKMarkerTask LKNE: apply=true weight=15
      IKMarkerTask LTHI2: apply=false weight=1
      IKMarkerTask LTHI3: apply=false weight=1
      IKMarkerTask LANK: apply=true weight=15
      IKMarkerTask LTIB2: apply=false weight=1
      IKMarkerTask LTIB3: apply=false weight=1
      IKMarkerTask RPSI: apply=true weight=15
      IKMarkerTask LPSI: apply=true weight=15
      IKMarkerTask RELB: apply=true weight=1
      IKMarkerTask LELB: apply=true weight=1
      IKMarkerTask RW1: apply=true weight=1
      IKMarkerTask RW2: apply=true weight=1
      IKMarkerTask LW1: apply=true weight=1
      IKMarkerTask LW2: apply=true weight=1
      IKMarkerTask Foot_r1: apply=true weight=2
      IKMarkerTask Foot_r4: apply=false weight=1
      IKMarkerTask Foot_r6: apply=true weight=1
      IKMarkerTask foot_l1: apply=true weight=2
      IKMarkerTask foot_l4: apply=false weight=1
      IKMarkerTask foot_l6: apply=true weight=1
      IKCoordinateTask [values shared by the 10 below unless stated]: apply=true value_type=manual_value
      IKCoordinateTask hip_rotation_r: weight=1 value=0
      IKCoordinateTask knee_angle_r: weight=0.1 value=-0.08726646
      IKCoordinateTask ankle_angle_r: weight=0.1 value=0.08726646
      IKCoordinateTask subtalar_angle_r: weight=1 value=0
      IKCoordinateTask hip_rotation_l: weight=1 value=0
      IKCoordinateTask knee_angle_l: weight=0.1 value=-0.08726646
      IKCoordinateTask ankle_angle_l: weight=0.1 value=0.08726646
      IKCoordinateTask subtalar_angle_l: weight=1 value=0
      IKCoordinateTask arm_add_r: apply=false weight=0.5 value=-0.08726646
      IKCoordinateTask arm_add_l: apply=false weight=0.5 value=-0.08726646
